# Grafik Çözüm
# İki bilinmeyenli iki tane denklemden oluşan bir lineer denklem takımında, değişkenlerin çözümü yaklaşık olarak 2D grafiklerden izlenebilir.
# Örnek:
a1y + a2x == a3
a4y + a5x == a6
# denklemlerinin grafik çözümlerini yapınız.
# Çözüm:
a1 := 5
a2 := -4
a3 := 13 - 8
f(x) := -a2/a1*x + a3/a1
a4 := 8
a5 := 5
a6 := 16 + 52
q(x) := -a5/a4*x + a6/a4
# [plot: f(x), q(x) vs x]
# [plot: f(x), q(x) vs x]
x := 5, 5.00001 .. 6
# [plot: f(x), q(x) vs x]
x := 5.21, 5.22 .. 5.3
# [plot: f(x), q(x) vs x]
