# LOGARİTMA UYGULAMALARI
# Logaritma Uygulamaları "Temel Matematik" (http://www.bedriemir.com/math) ders kitabında açıklanmış olan Logaritma Temelleri konusunda verilmiş ve az sayıda uygulaması yapılmış olan konunun daha genişletilerek daha fazla uygulama ile özümsenmesi amacı ile oluşturulmuştur.
# Uygulamalara yönelmeden önce, Temel Matematik kitabındaki Logaritma konusunda verilmiş kuramsal bilgilerin özümsenmesi yararlı olacaktır.
# Es gibt keinen Praxis, sondern eine gute Theorie.
Prandtl
# Logaritmalar, üstel bir ifadenin başka bir söylem ile açıklanmasıdır. Her logaritma bir üstel belirtimdir.
# Üstel Söylem :
b^us == sonuç
# Logaritmik Söylem :
log[b](sonuç) == us
# Açıklayıcı Şema :
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# Logaritma ile İlgili Bilgiler:
# Logaritma Temelinin logaritması 1 e eşittir.
log[b](b) == x  # Logaritmik Form
b^x == b  # Eşdeğer Üstel form
x == 1  # Üs zorunlu olarak 1 olmalıdır.
log[b](b) == 1  # veya
b^1 == b
log(10) = 1
ln(e) = 1
ln(2)/ln(2) = 1  # yani
log[2](2) == 1
# Logaritma temelinin logaritma temeli üssü, logaritma temeline eşittir.
b^log[b](b) == sonuç  # olarak düşünülürse
log[b](sonuç) == log[b](b)
# olacaktır. Oysa,
log[b](b) == 1  # veya
b^1 == b
# olduğundan,
log[b](sonuç) == 1  # ve
b^1 == sonuç
b == b  # olur.
# Buradan,
b^log[b](b) == b
# olarak belirlenir.
e^ln(e) = 2.71828  # (  # e  # sayısı)
10^log(10) = 10
2^(ln(2)/ln(2)) == 2^1 == 2
bulunur.
# 1 sayısının logaritması, her temelde 0 dır.
log[b](x) == 1  # eşdeğer olarak
b^x == 1  # olarak yazılabilir.
# oysa, her b için,
b^0 == 1  # olabilir. Bu nedenle,
log[b](1) == 0
# olarak belirlenir.
# Sıfır sayısının her temelden logaritması belirsizdir.
b^us == 0
# Hiçbir sayının hiçbir üssünün sonucu 0 olamaz. Bu yüzden, Her temelden sıfır sayısının logaritması belirsizdir.
# Örnek :
# log[2](8)  Söylemini açıklayınız ve sonucunu hesaplayınız.
# Çözüm :
# Üstel söylem :
2^us == 8
# Bu problemin çözümü, "2 nin üzerine öyle bir üs uygulansın ki, sonuç 8 olsun" şeklindedir.
# inceleme ile,
2^3 == 8
# olarak bulunur. Böylece,
log[2](8) == 3
# olarak belirlenir.
# Örnek :
# log[4](1/16)  değerini hesaplayınız.
# Çözüm :
# Üstel söylem :
4^us == 1/16
4^-2 == 1/4^2 == 1/16
# Bu durumda, log[4](1/16) == -2 olarak bulunur.
# Logaritma Kuralları
log[b](a*b) == log[b](a) + log[b](b)  # Çarpım Kuralı
log[b](a/b) == log[b](a) - log[b](b)  # Bölüm Kuralı
log[b](a^b) == b*log[b](a)  # Üstel Kuralı
log[a](b) == log[c](b)/log[c](a)  # Logaritma Temelini Değiştirme Kuralı
# Örnek :
b^log[b](x) == ?
# Çözüm : Üstel Kural ile,
log[b](x)*log[b](b) == log[b](x)*1 == log[b](x)
log[b](x) == y  # olarak kabul edilirse,
b^y == x  # olur.
# Bunun anlamı, y değerinin b sayısının üssü olduğunda, yapılanmanın değerinin x olacağıdır. Bu durumda, problem zaten b sayısının üzerine x üssü geldiğinde değerin ne olacağı idi, bu değerin, x olacağı görülüyor.
# Sonuç :
b^log[b](x) == x  # olacaktır.
10^log(3) = 3
e^ln(7) = 7
# Örnek :
log[b](b^x) == ?
# Çözüm :
# Üstel form :
b^? == b^x
# Aynı temel üzerindeki iki üs yapıları eşitse, her iki üs de eşit olduğundan,
? == x
# böylece,
log[b](b^x) == x
# olacaktır.
# Sayısal olarak,
log(10^6) = 6
# Örnek:
log[3](2.5673)
# değerini bulunuz.
# Çözüm:
# Doğal logaritma (e temelli) ve ondalıklı logaritma (10) temelli logaritrmalardan baika temelde logaritmalar tablolanmamıştır. Bu temellerden başka logaritmalar, tablolanmış temellerin değerlerinden yararlanılarak, logaritma dönüşüm kuralı ile hesaplanırlar.
log[3](2.5673) == ln(2.5673)/ln(3)
ln(2.5673)/ln(3) = 0.858223
# Sağlama:
3^0.858 = 2.56667
# Örnek :
log[-8](320)
# değerini bulunuz.
# Çözüm :
# Bu problem çözümsüzdür. Çünkü logaritmaların tanımında, temelin 0 dan büyük ve 1 den farklı olması gereği belirtilmiştir.
# Örnek :
log[a + b](244)
# değerini, 2 temelli logaritmaya dönüştürünüz.
# Çözüm:
# a ve b değerleri belli olmazsa bu problemin sayısal çözümü olmaz.
# Logaritma temelini değiştirme kuralı,
log[a](b) == log[c](b)/log[c](a)
# olarak belirtilmiştir.
log[a + b](244) == log[2](244)/log[2](a + b) == ln(244)/ln(2)/(ln(a + b)/ln(2)) == ln(244)/ln(a + b) == 5.497/ln(a + b)
# Bu yapılanma, bir logaritma değerinin, (a+b) temeline göre belirtilmesidir. Bu yapılanmada, a ve b değişkenleri (a + b) > 0 olmak koşulu ile, her değeri alabilirler. Örnek olarak, 2 temelli logaritma değerleri isteniyorsa, a =1 ve b=1 olarak alınabilir.
# Örnek:
e^3 == 27
# olarak verildiğine göre,
log[3](27)
# değerini bulunuz.
# Çözüm:
# Bu sorunun yanıtı içinde, sadece iyi bir bilgi ve farklı bir bakış açısı ile incelemek gerekli bu yüzden iyibi test sorusu olabilir. Çözümün dikkatle izlenmesi gereklidir.
# Üstel yapı :
b^üs == sonuç
# Logaritmik yapı :
log[b](sonuç) == us
# olarak belirtildiğine göre, her iki eşdeğer yapılanmada, bilinmeyenler, bilinenlerden başlayarak hesaplanabilir.
# Bu problemde ise, herşey bilinmektedir. Burada,
b == 3
sonuç == 27
us == 3
# olarak verildiğne göre,
log[3](27) == 3
# olarak, hesap yapmaya gerek kalmadan bulunur.
# Sağlama :
3^3 = 27
# Örnek :
log[5](516)
# değerini bulunuz.
# Çözüm :
# Bu değer inceleme ile bulunamayacak kadar hesaplama gerektirmektedir. Hesap makineleri ile,
ln(516)/ln(5) = 3.88092
# olarak saptanır.
# Sağlama :
5^3.881 = 516.063
# Birbirleri ile yüzde yüz aynı olmamalarının nedeni, yuvarlatma hatalarıdır. Yuvarlatma hataları, ne kadar çok ondalık kullanılırsa, o kadar azalmaya doğru bir eğilim gösterir.
